*Heading
** Job name: Job-1 Model name: Model-1
** Generated by: Abaqus/CAE Student Edition 2016
*Preprint, echo=NO, model=NO, history=NO, contact=NO
**
** PARTS
**
*Part, name=Part-1
*Node
      1,  0.980784833,  0.195092678,           0.
      2,  0.831465602,  0.555576205,           0.
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*Element, type=C3D20R
 1,   9,  22,  18,  10,  34,  47,  43,  35, 104, 103, 102, 101, 105, 106, 107,
    108, 110, 109, 111, 112
 2,  20,  11,   1,  22,  45,  36,  26,  47, 116, 115, 114, 113, 117, 118, 119,
    120, 122, 121, 123, 109
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*Nset, nset=Set-1, generate
   1,  331,    1
*Elset, elset=Set-1, generate
  1,  45,   1
** Section: Section-1
*Solid Section, elset=Set-1, material=Material-1
,
*End Part
**
**
** ASSEMBLY
**
*Assembly, name=Assembly
**
*Instance, name=Part-1-1, part=Part-1
          0.,           0.,           0.
          0.,           0.,           0.,           1.,           0.,           0.,          90.
*End Instance
**
*Nset, nset=Set-1, instance=Part-1-1
   5,   6,  30,  31,  55,  56
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*Elset, elset=Set-1, instance=Part-1-1, generate
  6,  36,  15
*Nset, nset=Set-2, instance=Part-1-1
   3,  10,  18,  28,  35,  43
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*Elset, elset=Set-2, instance=Part-1-1
  1, 11, 16, 26, 31, 41
*Nset, nset=Set-3, instance=Part-1-1
   1,   2,   3,   4,   5,   6
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*Elset, elset=Set-3, instance=Part-1-1, generate
  1,  15,   1
*Nset, nset=Set-4, instance=Part-1-1
  76,  77,  78,  79,  80,  81
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*Elset, elset=Set-4, instance=Part-1-1, generate
 31,  45,   1
*Nset, nset=Set-5, instance=Part-1-1
   1,   2,   3,   4,   5,   6
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*Elset, elset=Set-5, instance=Part-1-1, generate
  1,  15,   1
*Nset, nset=Set-6, instance=Part-1-1
   3,  10,  18,  28,  35,  43
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*Elset, elset=Set-6, instance=Part-1-1
  1, 11, 16, 26, 31, 41
*Nset, nset=Set-7, instance=Part-1-1
   5,   6,  30,  31,  55,  56
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*Nset, nset="_T-Datum csys-2", internal
Set-4,
Set-5,
Set-6,
Set-7,
*Transform, nset="_T-Datum csys-2", type=C
          0.,           0.,           0.,           0.,           0.,           1.
*End Assembly
**
** MATERIALS
**
*Material, name=Material-1
*Elastic
 2.1e+11, 0.3
*Expansion
 0.00023,
** ----------------------------------------------------------------
**
** STEP: Step-1
**
*Step, name=Step-1, nlgeom=NO, perturbation
*Static
**
** BOUNDARY CONDITIONS
**
** Name: BC-1 Type: Displacement/Rotation
*Boundary
Set-4, 2, 2
** Name: BC-2 Type: Displacement/Rotation
*Boundary
Set-5, 2, 2
** Name: BC-3 Type: Displacement/Rotation
*Boundary
Set-6, 3, 3
** Name: BC-4 Type: Displacement/Rotation
*Boundary
Set-7, 3, 3
**
** PREDEFINED FIELDS
**
** Name: Predefined Field-1   Type: Temperature Using Field: AnalyticalField-1
*Temperature
Part-1-1.1, 1.17588
Part-1-1.2, 1.38704
Part-1-1.3, 1.
Part-1-1.4, 1.41421
Part-1-1.5, 2.3696
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Part-1-1.331, 1.4074
**
** OUTPUT REQUESTS
**
**
** FIELD OUTPUT: F-Output-1
**
*Output, field, variable=PRESELECT
**
** HISTORY OUTPUT: H-Output-1
**
*Output, history, variable=PRESELECT
*End Step
